a := 3.5344
pi := 3.14
Δpi := 0.0016
Δa := 0.000005
h := 2.5
Δh := 0.05
δa := Δa/|a|
δa = 1.41467e-6
V(pi, h) := pi*h^3/6
V(pi, h) = 8.17708
aa := d/dpi(V(pi, h)) = 2.60417
b := 0.0002545
bb := d/dh(V(pi, h)) = 9.8125
b1 := 0.000254
Δb := 0.000001
Δ := |b - b1| = 5e-7
ΔV := |aa|*Δpi + |bb|*Δh = 0.494792
Δb1 := Δb + Δ = 1.5e-6
δV := ΔV/|V(pi, h)| = 0.0605096
δb1 := Δb1/|b1| = 0.00590551
c := 0.4678
Δc := 0.00001
n := 4
d := 1.2456
Δd := 0.000001
summa := Δc + Δd = 1.1e-5
razn := Δc + Δd = 1.1e-5
umn := |c|*Δd + |d|*Δc = 1.29238e-5
del := (|c|*Δd + |d|*Δc)/d^2 = 8.32977e-6
step := n*c^(n - 1)*Δc = 4.09487e-6
