t := [-60; -40; -20]
C := [1.59; 1.79; 1.99]
Cp := -50
linterp(t, C, Cp) = 1.69
t := [-60; -40; -20]
C := [1.59; 1.79; 1.99]
L(a, i1, i2, i3) := C[i1]*(a - t[i2])*(a - t[i3])/((t[i1] - t[i2])*(t[i1] - t[i3])) + C[i2]*(a - t[i1])*(a - t[i3])/((t[i2] - t[i1])*(t[i2] - t[i3])) + C[i3]*(a - t[i1])*(a - t[i2])/((t[i3] - t[i1])*(t[i3] - t[i2]))
L(Cp, 0, 1, 2) = 1.69
C1(i1, i2) := (C[i2] - C[i1])/(t[i2] - t[i1])
C2(i1, i2, i3) := (C1(i2, i3) - C1(i1, i2))/(t[i3] - t[i1])
N(a, i1, i2, i3) := C[i1] + (a - t[i1])*C1(i1, i2) + (a - t[i1])*(a - t[i2])*C2(i1, i2, i3)
N(Cp, 0, 1, 2) = 1.69
Origin := 0
t := [-60; -40; -20]
P := [1.59; 1.79; 1.99]
i := 0 .. 1
h[i] := t[i + 1]*(-t[i])
h = [-2400; -800]
B := [0; 0]
C := [0; 0]
D := [0; 0]
Given
B[0]*h[0] + C[0]*h[0]^2 + D[0]*h[0]^3 == P[1] - P[0]
B[1]*h[1] + C[1]*h[1]^2 + D[1]*h[1]^3 == P[2] - P[1]
B[1] - B[0] - 2*C[0]*h[0] - 3*D[0]*h[0]^2 == 0
C[1] - C[0] - 3*D[0]*h[0] == 0
C[1] + 3*D[1]*h[1] == 0
C[0] == 0
[B; C; D] := Find(B, C, D)
B = [-2.08333e-5; -0.000208333]
C = [0; 7.8125e-8]
D = [-1.08507e-11; 3.25521e-11]
i := 0 .. 1
S := P[1] + B[1]*(t - t[1]) + C[1]*(t - t[1])^2 + D[1]*(t - t[1])^3
d := cspline(t, P)
interp(d, t, P, -50) = 1.69
