x := [1; 2; 3; 4; 5]
y := [8.2; 5.9; 4.9; 4; 3.2]
N := length(x) - 1
i := 0 .. N
a := slope(x, y)
a = -1.19
b := intercept(x, y)
b = 8.81
yLiner := a*x + b
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yLiner = [7.62; 6.43; 5.24; 4.05; 2.86]
sum((y - yLiner)^2) = 0.851
