x := [1; 2; 3; 4; 5]
y := [8.2; 5.9; 4.9; 4; 3.2]
N := length(x) - 1
i := 0 .. N
k := exp(intercept(vectorize(ln(x)), vectorize(ln(y))))
m := slope(vectorize(ln(x)), vectorize(ln(y)))
k = 8.50861
m = -0.561385
yS(x) := k*x^m
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yS(x) = [8.50861; 5.76587; 4.59208; 3.90725; 3.44721]
sum((y - yS(x))^2) = 0.277755
