x := [1; 2; 3; 4; 5]
y := [8.2; 5.9; 4.9; 4; 3.2]
N := length(x) - 1
i := 0 .. N
k := exp(intercept(x, vectorize(ln(y))))
m := slope(x, vectorize(ln(y)))
k = 9.82314
m = -0.227062
yP(x) := k*exp(m*x)
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yP(x) = [7.82778; 6.23773; 4.97066; 3.96098; 3.15639]
sum((y - yP(x))^2) = 0.261029
