x := [1; 2; 3; 4; 5]
y := [8.2; 5.9; 4.9; 4; 3.2]
N := length(x) - 1
i := 0 .. N
k := slope(vectorize(ln(x)), y)
m := intercept(vectorize(ln(x)), y)
k = -3.04447
m = 8.15508
yL(x) := k*ln(x) + m
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yL(x) = [8.15508; 6.04481; 4.81038; 3.93454; 3.25519]
sum((y - yL(x))^2) = 0.0383496
