x := [1; 2; 3; 4; 5]
y := [8.2; 5.9; 4.9; 4; 3.2]
N := length(x) - 1
i := 0 .. N
k := slope(1/x, y)
m := intercept(1/x, y)
k = 5.84161
m = 2.57233
yH(x) := if(x == 0, "error", k/x + m)
m = 2.57233
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yH(x) = [8.41394; 5.49314; 4.51954; 4.03273; 3.74065]
sum((y - yH(x))^2) = 0.64944
