x := [1; 2; 3; 4; 5]
y := [8.2; 5.9; 4.9; 4; 3.2]
N := length(x) - 1
i := 0 .. N
yK(x) := [1; x; x^2]
a := linfit(x, y, yK)
a = [10.36; -2.51857; 0.221429]
yU(x) := a[2]*x^2 + a[1]*x + a[0]
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yU(x) = [8.06286; 6.20857; 4.79714; 3.82857; 3.30286]
sum((y - yU(x))^2) = 0.164571
