rectangle(a, b, n, f) :=
    h ← (b - a)/n
    S ← 0
    for j ∈ 1 .. n
        x[j - 1] ← a + h*(j - 1)
        S ← S + f(x[j - 1])
    S ← S*h
    S
f(x) := 1/sqrt(1 + x^2)
rectangle(0, 1, 1000, f) = 0.88152
rectangle1(a, b, n, f) :=
    h ← (b - a)/n
    S ← 0
    for j ∈ 1 .. n
        x[j] ← a + h*j
        S ← S + f(x[j])
    S ← S*h
    S
rectangle1(0, 1, 1000, f) = 0.881227
rectangle2(a, b, n, f) :=
    h ← (b - a)/n
    S ← 0
    for j ∈ 1 .. n
        x[j] ← a + h*j
        S ← S + f(x[j] - h/2)
    S ← S*h
    S
rectangle2(0, 1, 1000, f) = 0.881374
trap(a, b, n, f) :=
    h ← (b - a)/n
    S ← 0
    for j ∈ 1 .. (n - 1)
        x[j] ← a + h*j
        S ← S + f(x[j])
    S ← (S + (f(a) + f(b))/2)*h
    S
trap(0, 1, 1000, f) = 0.881374
simpson(a, b, n, f) :=
    h ← (b - a)/n
    S1 ← 0
    for j ∈ 1 .. (n/2)
        x[2*j - 1] ← a + h*(2*j - 1)
        S1 ← S1 + f(x[2*j - 1])
    S2 ← 0
    for k ∈ 1 .. (n/2 - 1)
        x[2*k] ← a + h*2*k
        S2 ← S2 + f(x[2*k])
    S ← (4*S1 + 2*S2 + (f(a) + f(b)))*h/3
    S
simpson(0, 1, 1000, f) = 0.881374
f(x) := 1/sqrt(1 + x^2)
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t := 0, 0.125 .. 1
a := 1
b := 1
N := 1000
i := 1 .. N
x[i] := rnd(a)
y[i] := rnd(b)
m[i] := if(y[i] < f(x[i]), 1, 0)
M := sum(m[i], i)
M = 871
S := M*a*b/N
S = 0.871
