A := [5, 0, 1; 1, 3, -5; -3, 2, 10]
b := [11; 12; 6]
P := augment(A, b)
R := rref(P)
R = [1, 0, 0, 2.11374; 0, 1, 0, 4.01422; 0, 0, 1, 0.43128]
n := cols(R)
x := R[:, n - 1]
x = [2.11374; 4.01422; 0.43128]
A := [5, 0, 1; 1, 3, -5; -3, 2, 10]
b := [11; 12; 6]
t := 0.09
N := 45
x[:, 0] := [11; 12; 6]
D := A^0 - t*A
c := t*b
k := 0 .. N
x[:, k + 1] := D*x[:, k] + c
Δx[k] := |x[:, k + 1] - x[:, k]|
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x[:, N + 1] = [2.11374; 4.01422; 0.43128]
