F(x) := [4*x[0] + tan(x[0]*x[1]); (x[1]^2 - 3)^2 + ln(x[0])]
t := 0.005
N := 50
x[:, 0] := [0.6; -1.9]
F(x[:, 0]) = [0.224125; -0.138726]
k := 0 .. N
x[:, k + 1] := x[:, k] + t*F(x[:, k])
Δx[k] := |x[:, k + 1] - x[:, k]|
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x[:, N + 1] = [0.619033; -1.91668]
